// SBML level 3 version 2

function f_oscillation(x)
  cos(x/10);
end

model tiny_example_12(c, glc, atp, adp, phos)
  // Description
  // A minimal example in SBML format.
  // The content of this model has been carefully created in a manual research effort.
  // This file has been created by SBML team.
  // Terms of use
  // Copyright © 2019 SBML team.
  // Redistribution and use of any part of this model, with or without modification, are permitted provided that the following conditions are met:
  // Redistributions of this SBML file must retain the above copyright notice, this list of conditions and the following disclaimer.
  // Redistributions in a different form must reproduce the above copyright notice, this list of conditions and the following disclaimer in the documentation and/or other materials provided with the distribution.
  // This model is distributed in the hope that it will be useful, but WITHOUT ANY WARRANTY; without even the implied warranty of MERCHANTABILITY or FITNESS FOR A PARTICULAR PURPOSE.
  // GO:0008152
  // hasTaxon taxonomy:9606
  // model units - substance: mmole, time: second, volume: litre, area: m2, length: metre, extent: mmole

  // Compartments:
  compartment c = 1e-5 litre; c is "cell compartment";  // GO:0005623 FMA:68646

  // Species:
  species glc in c = 4.5 mM; glc is "glucose";  // CHEBI:4167 kegg.compound:C00031
  species g6p in c = 0.1; g6p is "glucose-6-phosphate";  // CHEBI:58225; isVersionOf kegg.compound:C00668
  species atp in c = 3; atp is "ATP";  // CHEBI:30616; isVersionOf kegg.compound:C00002
  species adp in c = 0.8; adp is "ADP";  // CHEBI:456216; isVersionOf kegg.compound:C00008
  species $phos in c = 0; phos is "P";  // CHEBI:43474; isVersionOf kegg.compound:C00009
  species $hydron in c = 0; hydron is "H+";  // CHEBI:15378 kegg.compound:C00080
  species $h2o in c = 0; h2o is "H2O";  // CHEBI:15377; isVersionOf kegg.compound:C00001

  // Parameters:
  Vmax_GK = 1e-6 mmole_per_s; Vmax_GK is "Vmax Glucokinase";
  Km_glc = 0.5 mM; Km_glc is "Km glucose";
  Km_atp = 0.1 mM; Km_atp is "Km ATP";
  Km_adp = 0.1 mM; Km_adp is "Km ADP";
  Vmax_ATPASE = 1e-6 mmole_per_s; Vmax_ATPASE is "Vmax ATPase";
  zero = 0 mmole_per_s; zero is "zero bound";
  inf = INF; inf has mmole_per_s; inf is "upper bound";
  minus_1000 = -1000 mmole_per_s;
  plus_1000 = 1000 mmole_per_s;
  a_sum has mM; a_sum is "ATP + ADP balance";

  // Assignment rules:
  a_sum := atp + adp;

  // Reactions:
  GK: glc + atp => g6p + adp + $hydron; Vmax_GK*(glc/(Km_glc + glc))*(atp/(Km_atp + atp)); GK is "Glucokinase";  // isVersionOf ec-code:2.7.1.2 uniprot:P35557 kegg.reaction:R01092 rhea:36495
  ATPPROD: adp + $phos + $hydron => atp + $h2o; Vmax_ATPASE*(adp/(Km_adp + adp))*f_oscillation(time/(1 second)); ATPPROD is "ATP production";
  EX_glc: glc => ; zero; EX_glc is "glucose exchange";
  EX_g6p: g6p => ; zero; EX_g6p is "glucose-6 phosphate exchange";

  // Events:
  reset_concentrations: at (time >= 200 second), t0=false: glc = 4.5 mM, atp = 3 mM, adp = 0.8 mM, g6p = 0.1 mM;

  // Constraints:
  constraint atp >= 0 mM;  // ATP must be non-negative

  // Unit definitions:
  unit m2 = metre^2;
  unit mmole = 1e-3 mole;
  unit mM = 1e-3 mole / litre;
  unit mmole_per_s = 1e-3 mole / second;
end
